*Heading
** Job name: circular Model name: Model-1
** Generated by: Abaqus/CAE 2022
*Preprint, echo=NO, model=NO, history=NO, contact=NO
**
** PARTS
**
*Part, name=Part-1
*Node
      1, -0.824999988,  0.129903808,           0.
      2, -0.879903793,  0.075000003,           0.
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*Element, type=DC3D8
   1,   49,    4,    5,   90,  141,   96,   97,  182
   2,    2,    3,   88,   89,   94,   95,  180,  181
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*Nset, nset=Set-All, generate
    1,  4692,     1
*Elset, elset=Set-All, generate
    1,  3450,     1
*Nset, nset=Set-length1
 350,
*Nset, nset=Set-length2
 1178,
*Nset, nset=Set-length3
 2374,
*Nset, nset=Set-width4
 2351,
*Nset, nset=Set-width5
 2383,
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** Section: Section-1
*Solid Section, elset=Set-All, material=Material-1
1.,
*End Part
**
**
** ASSEMBLY
**
*Assembly, name=Assembly
**
*Instance, name=Part-1, part=Part-1
*End Instance
**
*Nset, nset=Set-1, instance=Part-1
    6,    8,   15,   16,   17,   18
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*Elset, elset=Set-1, instance=Part-1
    5,    9,   10,   11,   12,   13
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*Nset, nset=Set-2, instance=Part-1
    7,   14,   31,   32,   33,   34
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*Elset, elset=Set-2, instance=Part-1
   34,   45,   47,   49,   50,   52
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*Nset, nset=Set-3, instance=Part-1
    8,    9,   10,   11,   12,   13
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*Elset, elset=Set-3, instance=Part-1
    6,    7,    8,   22,   23,   37
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*Nset, nset=Set-4, instance=Part-1
    1,    2,    3,    4,    5,    6
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*Elset, elset=Set-4, instance=Part-1
    1,    2,    3,   40,   41,   67
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*Nset, nset=Set-5, instance=Part-1, generate
 4601,  4692,     1
*Elset, elset=Set-5, instance=Part-1, generate
 3382,  3450,     1
*Nset, nset=Set-6, instance=Part-1, generate
  1,  92,   1
*Elset, elset=Set-6, instance=Part-1, generate
  1,  69,   1
*Elset, elset=_Surf-1_S6, internal, instance=Part-1
    5,    9,   10,   11,   12,   13
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*Elset, elset=_Surf-1_S4, internal, instance=Part-1, generate
   63,  3444,    69
*Surface, type=ELEMENT, name=Surf-1
_Surf-1_S6, S6
_Surf-1_S4, S4
*Elset, elset=_Surf-2_S6, internal, instance=Part-1
   34,   50,   53,   54,   55,   56
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*Elset, elset=_Surf-2_S4, internal, instance=Part-1
   45,   47,   61,  114,  116,  130
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*Elset, elset=_Surf-2_S3, internal, instance=Part-1, generate
   49,  3430,    69
*Elset, elset=_Surf-2_S5, internal, instance=Part-1, generate
   52,  3433,    69
*Surface, type=ELEMENT, name=Surf-2
_Surf-2_S6, S6
_Surf-2_S4, S4
_Surf-2_S3, S3
_Surf-2_S5, S5
*Elset, elset=_Surf-3_S6, internal, instance=Part-1, generate
    6,  3387,    69
*Elset, elset=_Surf-3_S4, internal, instance=Part-1
    7,   22,   23,   76,   91,   92
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*Elset, elset=_Surf-3_S3, internal, instance=Part-1
    8,   37,   65,   66,   77,  106
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*Surface, type=ELEMENT, name=Surf-3
_Surf-3_S6, S6
_Surf-3_S4, S4
_Surf-3_S3, S3
*Elset, elset=_Surf-4_S4, internal, instance=Part-1
    1,   40,   41,   70,  109,  110
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*Elset, elset=_Surf-4_S3, internal, instance=Part-1
    2,    3,   71,   72,  140,  141
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*Elset, elset=_Surf-4_S6, internal, instance=Part-1, generate
   67,  3448,    69
*Surface, type=ELEMENT, name=Surf-4
_Surf-4_S4, S4
_Surf-4_S3, S3
_Surf-4_S6, S6
*Elset, elset=_Surf-5_S2, internal, instance=Part-1, generate
 3382,  3450,     1
*Surface, type=ELEMENT, name=Surf-5
_Surf-5_S2, S2
*Elset, elset=_Surf-6_S1, internal, instance=Part-1, generate
  1,  69,   1
*Surface, type=ELEMENT, name=Surf-6
_Surf-6_S1, S1
*End Assembly
*Amplitude, name=Amp-x+, definition=SMOOTH STEP
             0.,            560.,          10000.,            560.
*Amplitude, name=Amp-x-, definition=SMOOTH STEP
             0.,            560.,          10000.,            560.
*Amplitude, name=Amp-y+, definition=SMOOTH STEP
             0.,            560.,          10000.,            560.
*Amplitude, name=Amp-y-, definition=SMOOTH STEP
             0.,            560.,          10000.,            560.
*Amplitude, name=Amp-z+, definition=SMOOTH STEP
             0.,            560.,          10000.,            560.
*Amplitude, name=Amp-z-, definition=SMOOTH STEP
             0.,            560.,          10000.,            560.
**
** MATERIALS
**
*Material, name=Material-1
*Conductivity
202.,100.
202.,200.
204.,300.
201.,400.
194.,500.
190.,550.
*Density
2800., 20.
2800.,200.
*Elastic
 6.8e+07, 0.29,  20.
 6.5e+07, 0.29, 100.
 6.1e+07, 0.29, 200.
 5.7e+07, 0.29, 300.
 5.2e+07, 0.29, 400.
 4.7e+07, 0.29, 500.
*Expansion
 2e-05,100.
 3e-05,200.
 3e-05,300.
 3e-05,400.
 3e-05,500.
 3e-05,550.
*Specific Heat
 910.,100.
 956.,200.
1007.,300.
1052.,400.
1124.,500.
1150.,550.
**
** INTERACTION PROPERTIES
**
*Film Property, name=IntProp-x+
30., 560.
*Film Property, name=IntProp-x-
30., 560.
*Film Property, name=IntProp-y+
30., 560.
*Film Property, name=IntProp-y-
30., 560.
*Film Property, name=IntProp-z+
30., 560.
*Film Property, name=IntProp-z-
30., 560.
**
** PREDEFINED FIELDS
**
** Name: Predefined Field-x+   Type: Temperature
*Initial Conditions, type=TEMPERATURE
Set-3, 30.
** Name: Predefined Field-x-   Type: Temperature
*Initial Conditions, type=TEMPERATURE
Set-4, 30.
** Name: Predefined Field-y+   Type: Temperature
*Initial Conditions, type=TEMPERATURE
Set-1, 30.
** Name: Predefined Field-y-   Type: Temperature
*Initial Conditions, type=TEMPERATURE
Set-2, 30.
** Name: Predefined Field-z+   Type: Temperature
*Initial Conditions, type=TEMPERATURE
Set-5, 30.
** Name: Predefined Field-z-   Type: Temperature
*Initial Conditions, type=TEMPERATURE
Set-6, 30.
** Name: initTempAll   Type: Temperature
*Initial Conditions, type=TEMPERATURE
Part-1.Set-All, 30.
** ----------------------------------------------------------------
**
** STEP: Step-1
**
*Step, name=Step-1, nlgeom=NO, inc=1000000
*Heat Transfer, end=PERIOD, deltmx=3., mxdem=0.01
0.01, 10000., 0.001, 600.,
**
** INTERACTIONS
**
** Interaction: Int-x+
*Sfilm, amplitude=Amp-x+
Surf-3, F, 1., IntProp-x+
** Interaction: Int-x-
*Sfilm, amplitude=Amp-x-
Surf-4, F, 1., IntProp-x-
** Interaction: Int-y+
*Sfilm, amplitude=Amp-y+
Surf-1, F, 1., IntProp-y+
** Interaction: Int-y-
*Sfilm, amplitude=Amp-y-
Surf-2, F, 1., IntProp-y-
** Interaction: Int-z+
*Sfilm, amplitude=Amp-z+
Surf-5, F, 1., IntProp-z+
** Interaction: Int-z-
*Sfilm, amplitude=Amp-z-
Surf-6, F, 1., IntProp-z-
**
** OUTPUT REQUESTS
**
*Restart, write, frequency=0
**
** FIELD OUTPUT: F-Output-1
**
*Output, field, variable=PRESELECT
**
** HISTORY OUTPUT: H-Output-1
**
*Output, history
*Radiation Output
FTEMP,
*Contact Output
HTL,
*End Step
